# Flight 100 2016-10-30 Live Video Range/Angle Analysis
# Base Receiver Station at Parking Area 6, Willow Slough, IN:
# 41°0.86' N 87°29.91' W 673 ft
# Launch Time from Ottawa, IL: 12:23:45
# Balloon time/location at
# Early reception: 12:5:14 41°8.16' N 88°24.98' W 37330 ft
# Good Reception: 12:58:14 41°6.42' N 88°15.00' W 48471 ft
# Midway: 13:10:15 41°5.82' N 88°5.63' W 61905 ft
# Burst: 13:39:12 41°7.80' N 87°43.57' W 94446 ft
# Recording Start/End: 12:50:10 / 13:45:32
GeoCoords(latdeg, latmin, latdir, londeg, lonmin, londir) := [(londeg + lonmin/60)*londir; (latdeg + latmin/60)*latdir]*π/180
t(hr, min, sec) := (sec + 60*(min + 60*hr))*s
hr(t) := floor(t/(3600 s))
min(t) := floor((t - hr(t)*3600 s)/(60 s))
secs(t) := t/sec - 60*(min(t) + 60*hr(t))
time(t) := [hr(t), min(t), secs(t)]
t_launch := t(12, 23, 45)
t_vidstart := t(12, 50, 10)
TargLoc := [
    GeoCoords(41, 8.16, 1, 88, 24.98, -1);
    GeoCoords(41, 6.42, 1, 88, 15, -1);
    GeoCoords(41, 5.82, 1, 88, 5.63, -1);
    GeoCoords(41, 7.8, 1, 87, 43.57, -1)
]
TargAlt := [37330; 48471; 61905; 94446]*ft
TargTime := [t(12, 50, 14); t(12, 58, 14); t(13, 10, 15); t(13, 39, 12)]
TargTime = [12.8372; 12.9706; 13.1708; 13.6533] hr
BaseLoc := GeoCoords(41, 0.86, 1, 87, 29.91, -1) = [-87.4985; 41.0143] deg
BaseAlt := 205 m = 672.572 ft
R_e := (6.371*10^6) m
i := 0 .. 3
# Earth-Centered Radii of locations
a := BaseAlt + R_e
b[i] := TargAlt[i] + R_e
b = [6382378; 6385774; 6389869; 6399787] m
# Central Angle (at earth's center)
γ_cent(Base, Targ) := acos(sin(Base[1])*sin(Targ[1]) + cos(Base[1])*cos(Targ[1])*cos(Base[0] - Targ[0]))
γ[i] := γ_cent(BaseLoc, TargLoc[i])
# Line of Sight distance | Elevation Angle
c(a, b, γ) := sqrt(a^2 + b^2 - 2*a*b*cos(γ))
θ_el(a, b, c) := acos(0.5*(a^2 - b^2 + c^2)/(a*c)) - π/2
c := vectorize(c(a, b, γ)) = [49.0767; 40.7362; 33.6479; 22.8222] mi
vectorize(θ_el(a, b, c)) = [7.78128; 12.5527; 19.9326; 50.9921] deg
t_vid := stack(time(TargTime[0] - t_vidstart), time(TargTime[1] - t_vidstart), time(TargTime[2] - t_vidstart), time(TargTime[3] - t_vidstart))
t_vid = [0, 0, 4; 0, 8, 4; 0, 20, 5; 0, 49, 2]
